*HEADING
Wing shell from CFD pressure
*NODE
1,0.070525996,-0.000146786,-0.362361014
2,0.070534497,-0.000321712,0.362361014
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*ELEMENT, TYPE=S3, ELSET=ALL_SHELL
1,174,166,168
2,168,193,174
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*MATERIAL, NAME=CFRP
*ELASTIC
7e+10,0.3
*DENSITY
1600
*SHELL SECTION, ELSET=ALL_SHELL, MATERIAL=CFRP
0.0025
*NSET, NSET=MOUNT
1,2
*BOUNDARY
MOUNT, 1, 6
*STEP
*NODE FILE
U
*EL FILE
S
*NODE FILE, NSET=ALL
U
*EL FILE, ELSET=ALL_SHELL
S
*STATIC
*DLOAD
1,P,136.451996
2,P,136.451996
3,P,588.291992
4,P,588.291992
5,P,559.348999
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384,P,-69.7491989
*NSET, NSET=ALL, GENERATE
1,0,1
*NODE PRINT, NSET=ALL
U
*EL PRINT, ELSET=ALL_SHELL
S
*END STEP
