*HEADING
Wing shell from CFD pressure
*NODE
1,0.0119045004,-0.0105491998,-0.395574987
2,0.0119045004,-0.0105491998,0.395574987
3,0.0132277003,-0.0283189006,-0.373659015
4,0.0132277003,-0.0283189006,-0.34375
5,0.0132277003,-0.0283189006,-0.3125
6,0.0132277003,-0.0283189006,-0.28125
7,0.0132277003,-0.0283189006,-0.25
8,0.0132277003,-0.0283189006,-0.21875
9,0.0132277003,-0.0283189006,-0.1875
10,0.0132277003,-0.0283189006,-0.15625
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*ELEMENT, TYPE=S3, ELSET=ALL_SHELL
1,107,84,30
2,30,28,107
3,248,219,221
4,248,221,271
5,271,294,248
6,36,88,89
7,89,37,36
8,276,275,227
9,227,228,276
10,40,92,93
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*MATERIAL, NAME=CFRP
*ELASTIC
7e+10,0.3
*DENSITY
1600
*SHELL SECTION, ELSET=ALL_SHELL, MATERIAL=CFRP
0.0025
*NSET, NSET=ALLNODES, GENERATE
1,295,1
*NSET, NSET=MOUNT
1,2,3,4,5,6,7,8,9,10,11,12,13,14,15,16
17,18,19,20,21,22,23,24,25,26,27,28,29
*STEP
*STATIC
*NODE PRINT, NSET=ALLNODES
U
*EL PRINT, ELSET=ALL_SHELL
S
*NODE FILE, NSET=ALLNODES
U
*EL FILE, ELSET=ALL_SHELL
S
*DLOAD
1,P,-500.964417
2,P,-500.964417
3,P,1223.24072
4,P,1223.24072
5,P,1223.24072
6,P,-1178.82617
7,P,-1178.82617
8,P,707.630188
9,P,707.630188
10,P,-1356.00928
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*BOUNDARY
MOUNT, 1, 6
*END STEP
