*HEADING
Wing shell from CFD pressure
*NODE
1,0.069739297,-0.00102981995,-0.363629997
2,0.0697698966,-0.00120007002,0.363629997
3,0.0714394003,0.00063206302,-0.0312316995
4,0.0714394003,0.00063206302,0.0312316995
5,0.0717175975,-0.00060670299,-0.3125
6,0.0717175975,-0.00060670299,-0.28125
7,0.0717175975,-0.00060670299,-0.25
8,0.0717175975,-0.00060670299,-0.21875
9,0.0717175975,-0.00060670299,-0.1875
10,0.0717175975,-0.00060670299,-0.15625
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*ELEMENT, TYPE=S3, ELSET=ALL_SHELL
1,103,101,134
2,134,157,103
3,137,136,81
4,81,82,137
5,137,82,83
6,83,138,137
7,141,140,85
8,85,86,141
9,141,86,87
10,87,142,141
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*MATERIAL, NAME=CFRP
*ELASTIC
7e+10,0.3
*DENSITY
1600
*SHELL SECTION, ELSET=ALL_SHELL, MATERIAL=CFRP
0.0025
*NSET, NSET=ALLNODES, GENERATE
1,241,1
*NSET, NSET=MOUNT
1,2
*STEP
*STATIC
*NODE PRINT, NSET=ALLNODES
U
*EL PRINT, ELSET=ALL_SHELL
S
*NODE FILE, NSET=ALLNODES
U
*EL FILE, ELSET=ALL_SHELL
S
*DLOAD
1,P,1016.38214
2,P,1016.38214
3,P,1272.33093
4,P,1272.33093
5,P,1332.22913
6,P,1332.22913
7,P,1435.21191
8,P,1435.21191
9,P,1454.35156
10,P,1454.35156
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*BOUNDARY
MOUNT, 1, 6
*END STEP
