*HEADING
Wing shell from CFD pressure
*NODE
1,0.069739297,-0.00102981995,-0.363629997
2,0.0697698966,-0.00120007002,0.363629997
3,0.0714394003,0.00063206302,-0.0312316995
4,0.0714394003,0.00063206302,0.0312316995
5,0.0717175975,-0.00060670299,-0.3125
6,0.0717175975,-0.00060670299,-0.28125
7,0.0717175975,-0.00060670299,-0.25
8,0.0717175975,-0.00060670299,-0.21875
9,0.0717175975,-0.00060670299,-0.1875
10,0.0717175975,-0.00060670299,-0.15625
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*ELEMENT, TYPE=S3, ELSET=ALL_SHELL
1,103,101,157
2,157,158,103
3,136,135,81
4,81,82,136
5,136,82,83
6,83,137,136
7,140,139,85
8,85,86,140
9,140,86,87
10,87,141,140
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*MATERIAL, NAME=CFRP
*ELASTIC
7e+10,0.3
*DENSITY
1600
*SHELL SECTION, ELSET=ALL_SHELL, MATERIAL=CFRP
0.0025
*NSET, NSET=ALLNODES, GENERATE
1,245,1
*NSET, NSET=MOUNT
1,2,3,4,5,6,7,8,9,10,11,12,13,14,15,16
17,18,19,20,21,22,23
*STEP
*STATIC
*NODE PRINT, NSET=ALLNODES
U
*EL PRINT, ELSET=ALL_SHELL
S
*NODE FILE, NSET=ALLNODES
U
*EL FILE, ELSET=ALL_SHELL
S
*DLOAD
1,P,1026.68542
2,P,1026.68542
3,P,1277.8988
4,P,1277.8988
5,P,1337.18652
6,P,1337.18652
7,P,1438.87122
8,P,1438.87122
9,P,1457.70068
10,P,1457.70068
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*BOUNDARY
MOUNT, 1, 6
*END STEP
